<?xml version="1.0"?>
<?xml-stylesheet type="text/xsl" href="http://jsbsim.sourceforge.net/JSBSim.xsl"?>
<fdm_config name="CUBESAT" version="2.0" release="BETA"
    xmlns:xsi="http://www.w3.org/2001/XMLSchema-instance"
    xsi:noNamespaceSchemaLocation="http://jsbsim.sourceforge.net/JSBSim.xsd">

    <fileheader>
      <author> Gabriel Alves Silva </author>
      <filecreationdate> 2024-10-15 </filecreationdate>
      <version> Version 1.0 </version>
      <description> Test file </description>
      <note>
        This model of a cubesat 6U was created using publicly available data, publicly available
        technical reports, textbooks, testing, and guesses. It contains no proprietary or
        restricted data.
        This simulation model is not endorsed by the manufacturer. This model is not
        to be sold.
      </note>
    </fileheader>

    <metrics>
        <wingarea unit="M2"> 0.02 </wingarea>
        <wingspan unit="M"> 1 </wingspan>
        <chord unit="M"> 1 </chord>
        <htailarea unit="M2"> 0 </htailarea>
        <htailarm unit="M"> 0 </htailarm>
        <vtailarea unit="M2"> 0 </vtailarea>
        <vtailarm unit="M"> 0 </vtailarm>
        <location name="AERORP" unit="M">
            <x> 0 </x>
            <y> 0 </y>
            <z> 0 </z>
        </location>
        <location name="EYEPOINT" unit="M">
            <x> 0 </x>
            <y> 0 </y>
            <z> 0 </z>
        </location>
        <location name="VRP" unit="M">
            <x> 0 </x>
            <y> 0 </y>
            <z> 0 </z>
        </location>
    </metrics>

    <mass_balance>
        <ixx unit="KG*M2"> 0.05416667 </ixx>
        <iyy unit="KG*M2"> 0.04166667 </iyy>
        <izz unit="KG*M2"> 0.02083333 </izz>
        <ixy unit="KG*M2"> 0 </ixy>
        <ixz unit="KG*M2"> 0 </ixz>
        <iyz unit="KG*M2"> 0 </iyz>
        <emptywt unit="KG"> 5 </emptywt>
        <location name="CG" unit="M">
            <x> 0 </x>
            <y> 0 </y>
            <z> 0 </z>
        </location>
    </mass_balance>

<ground_reactions>
        <contact type="BOGEY" name="CONTACT">
            <location unit="M">
                <x> 0 </x>
                <y> 0 </y>
                <z> -0.15 </z>
            </location>
            <static_friction> 0 </static_friction>
            <dynamic_friction> 0 </dynamic_friction>
            <rolling_friction> 0 </rolling_friction>
            <spring_coeff unit="N/M"> 10000 </spring_coeff>
            <damping_coeff unit="N/M/SEC"> 200000 </damping_coeff>
            <max_steer unit="DEG"> 0.0 </max_steer>
            <brake_group> NONE </brake_group>
            <retractable>0</retractable>
        </contact>
    </ground_reactions>

    <external_reactions>
      <!-- "Declare" the reefing term -->
      <property>fcs/parachute_reef_pos_norm</property>
      <property>propulsion/rocket_thrust</property>
      <property>actuator/RDR-x</property>
      <property>actuator/RDR-y</property>
      <property>actuator/RDR-z</property>

      <force name="parachute" frame="WIND">
        <function>
          <product>
            <property>aero/qbar-psf</property>
            <property>fcs/parachute_reef_pos_norm</property>
            <value> 1.0 </value>  <!-- Full drag coefficient -->
            <value> 10000.0 </value> <!-- Full parachute area -->
          </product>
        </function>
        <!-- The location below is in structural frame (x positive
             aft), so this location describes a point 1 foot aft
             of the origin. In this case, the origin is the center. -->
        <location unit="M">
          <x>0.3</x>
          <y>0</y>
          <z>0</z>
        </location>
        <!-- The direction describes a unit vector. In this case, since
             the selected frame is the WIND frame, the "-1" x component
             describes a direction exactly opposite of the direction
             into the WIND vector. That is, the direction specified below
             is the direction that the drag force acts in. -->
        <direction>
          <x> -1 </x>
          <y>  0 </y>
          <z>  0 </z>
        </direction>
      </force>

      <!-- ROTATION IN Y -->
      <property>actuator/RDR-x</property>
      <force name="RDR_y_1" frame="BODY">
        <function>
          <property> actuator/RDR-y </property>
        </function>
        <location unit="M">
          <x>0.5</x>
          <y>0</y>
          <z>0</z>
        </location>
        <direction>
          <x>  0 </x>
          <y>  0 </y>
          <z>  1 </z>
        </direction>
      </force>

      <force name="RDR_y_2" frame="BODY">
        <function>
          <property> actuator/RDR-y </property>
        </function>
        <location unit="M">
          <x>-0.5</x>
          <y>0</y>
          <z>0</z>
        </location>
        <direction>
          <x>  0 </x>
          <y>  0 </y>
          <z>  -1 </z>
        </direction>
      </force>

      <!-- ROTATION IN X -->
      <force name="RDR_x_1" frame="BODY">
        <function>
          <property> actuator/RDR-x </property>
        </function>
        <location unit="M">
          <x>0</x>
          <y>0</y>
          <z>0.5</z>
        </location>
        <direction>
          <x>  0 </x>
          <y>  1 </y>
          <z>  0 </z>
        </direction>
      </force>

      <force name="RDR_x_2" frame="BODY">
        <function>
          <property> actuator/RDR-x </property>
        </function>
        <location unit="M">
          <x>0</x>
          <y>0</y>
          <z>-0.5</z>
        </location>
        <direction>
          <x>  0 </x>
          <y> -1 </y>
          <z>  0 </z>
        </direction>
      </force>

      <!-- ROTATION IN Z -->
      <force name="RDR_z_1" frame="BODY">
        <function>
          <property> actuator/RDR-z </property>
        </function>
        <location unit="M">
          <x>0</x>
          <y>0.5</y>
          <z>0</z>
        </location>
        <direction>
          <x>  1 </x>
          <y>  0 </y>
          <z>  0 </z>
        </direction>
      </force>

      <force name="RDR_z_2" frame="BODY">
        <function>
          <property> actuator/RDR-z </property>
        </function>
        <location unit="M">
          <x>0</x>
          <y>-0.5</y>
          <z>0</z>
        </location>
        <direction>
          <x>  -1 </x>
          <y>  0 </y>
          <z>  0 </z>
        </direction>
      </force>


      <!--
      <force name="rocket" frame="INERTIAL">
        <function>
          <property> propulsion/rocket_thrust </property>
        </function>
        <location unit="M">
          <x>0</x>
          <y>0</y>
          <z>0</z>
        </location>
        <direction>
          <x>  1 </x>
          <y>  0 </y>
          <z>  0 </z>
        </direction>
      </force> -->

    </external_reactions>


      <propulsion>

      <!--
            <engine file="EPSS_C2">
            <feed>0</feed>
            <feed>1</feed>
            <thruster file="epss_c2_nozzle">
                <location unit="M">
                    <x> 0 </x>
                    <y> 0 </y>
                    <z> 0.15 </z>
                </location>
                <orient unit="DEG">
                    <roll> 0.0 </roll>
                    <pitch> 0.0 </pitch>
                    <yaw> 0.0 </yaw>
                </orient>
            </thruster>
        </engine>
        -->
            <!--
            <engine file="EPSS_C2">
            <feed>0</feed>
            <feed>1</feed>
            <thruster file="epss_c2_nozzle">
                <location unit="M">
                    <x> 0 </x>
                    <y> 0 </y>
                    <z> -0.15 </z>
                </location>
                <orient unit="DEG">
                    <roll> 0.0 </roll>
                    <pitch> 0.0 </pitch>
                    <yaw> 0.0 </yaw>
                </orient>
            </thruster>
        </engine>
        -->

        <!--Internal fuel -->

        <!--
        <tank type="FUEL" number="0">
          <location unit="M">
            <x>   0.00  </x>
            <y>   0.00 </y>
            <z>   0.75 </z>
          </location>
          <capacity unit="KG"> 1 </capacity>
          <contents unit="KG"> 0.8 </contents>
        </tank>
        -->

      </propulsion>

    <flight_control name="FGFCS">

      <channel name="Pointing">

        <fcs_function name="propulsion/tvc_inertial_x">
          <function>
            <quotient>
              <property>  velocities/eci-x-fps            </property>
              <property>  velocities/eci-velocity-mag-fps </property>
            </quotient>
          </function>
          <output> external_reactions/rocket/x </output>
        </fcs_function>

        <fcs_function name="propulsion/tvc_inertial_y">
          <function>
            <quotient>
              <property>  velocities/eci-y-fps            </property>
              <property>  velocities/eci-velocity-mag-fps </property>
            </quotient>
          </function>
          <output> external_reactions/rocket/y </output>
        </fcs_function>

        <fcs_function name="propulsion/tvc_inertial_z">
          <function>
            <quotient>
              <property>  velocities/eci-z-fps            </property>
              <property>  velocities/eci-velocity-mag-fps </property>
            </quotient>
          </function>
          <output> external_reactions/rocket/z </output>
        </fcs_function>

      </channel>

    </flight_control>

    <aerodynamics>
        <axis name="DRAG">
            <function name="aero/coefficient/CD">
                <description>Drag</description>
                <product>
                    <property>aero/qbar-psf</property>
                    <property>metrics/Sw-sqft</property>
                    <value>0.000</value>
                </product>
            </function>
        </axis>
    </aerodynamics>

    <output name="CubesatOut.csv" type="CSV" rate="1">
        <rates> ON </rates>
        <velocities> ON </velocities>
        <forces> ON </forces>
        <moments> ON </moments>
        <position> ON </position>
        <massprops> ON </massprops>

		<property> position/lat-geod-deg </property>
		<property> position/long-gc-deg </property>
		<property> position/geod-alt-ft </property>
		<property> attitude/phi-rad </property>
		<property> attitude/theta-rad </property>
		<property> attitude/psi-rad </property>
		<property> velocities/u-fps </property>
		<property> velocities/p-rad_sec </property>
		<property> velocities/q-rad_sec </property>
		<property> velocities/r-rad_sec </property>
		<property> velocities/phidot-rad_sec </property>
		<property> velocities/thetadot-rad_sec </property>
		<property> velocities/psidot-rad_sec </property>
		<property> inertia/cg-x-in </property>
		<property> inertia/iyy-slugs_ft2 </property>
		<property> aero/qbar-psf </property>
		<property> metrics/aero-rp-x-in </property>
    </output>

</fdm_config>
