<?xml version="1.0"?>
<rocket_engine name="EEPSS_C2">
  <isp>                    220  </isp> <!-- Specific Impulse -->
  <maxthrottle>           1.00  </maxthrottle>
  <minthrottle>           0.25  </minthrottle>
  <slfuelflowmax unit="LBS/SEC">   0.00102554 </slfuelflowmax>
  <sloxiflowmax unit="LBS/SEC">   0.00117909 </sloxiflowmax>
</rocket_engine>
